# Cálculo de los parámetros PID
# Para obtener los parámetros de control, se utiliza el método de la curva de reacción de la planta, al aplicarle una señal escalón conocida.
# Tiempo muerto , tomado de la respuesta del motor a un escalón
t0 := 0
t1 := 0.085
t2 := 0.251  # segundos
y1 := 3221  # RPM
y0 := 0  # RPM
γ0 := t2 - t1
γ0 = 0.166
τ0 := t1 - t0
τ0 = 0.085
u1 := 100000
u0 := 0
κ0 := (y1 - y0)/(u1 - u0)
κ0 = 0.03221
Kp := 1.2*γ0/(κ0*τ0)
Kp = 72.7578  # Constante proporcional
Ti := 2*τ0
Ti = 0.17  # Constante integrativa
Td := 0.5*τ0
Td = 0.0425  # Constante derivativa
Ts := 0.075  # tiempo de muestreo
a := Kp
b := Kp*Ts/Ti
c := Kp*Td/Ts
a = 72.7578
b = 32.099
c = 41.2294
t0 := 0
t1 := 0.085
t2 := 0.251  # seg
y1 := 3221  # RPM
y0 := 0  # RPM
γ0 := t2 - t1
γ = 0.577216
τ0 := t1 - t0
τ0 = 0.085
u1 := 100
u0 := 0
κ0 := (y1 - y0)/(u1 - u0)
κ0 = 32.21  # rpm/dc
Kp := 1.20*γ0/(κ0*τ0)
Kp = 0.0727578  # Ganancia proporcional
Ti := 2*τ0
Ti = 0.17  # Constante integrativa
Td := 0.5*τ0
Td = 0.0425  # Constante derivativa
Ts := 0.02  # tiempo de muestreo
a := Kp
b := Kp*Ts/Ti
c := Kp*Td/Ts
a = 0.0727578
b = 0.00855974
c = 0.15461
